<?xml version="1.0" encoding="UTF-8"?>

<!--
Copyright (C) 2026 Philips Nguyen

This program is free software; you can redistribute it and/or modify
it under the terms of the GNU General Public License as published by
the Free Software Foundation; either version 2 of the License, or
(at your option) any later version.
-->

<!--
    Mooney M20M Bravo starter propeller file for JSBSim.

    What is real:
    - 3 blades
    - constant-speed prop
    - 75 inch diameter

    What is still estimated:
    - min/max blade pitch
    - Ct/Cp tables
    - coefficient scaling
-->

<propeller name="M20M Starter Propeller" version="1.1">

    <!-- Prop rotational inertia -->
    <!-- Starter estimate: tune later if engine spool/governor feel is off -->
    <ixx unit="SLUG*FT2">2.15</ixx>

    <!-- AOPA Bravo review lists 75-inch diameter, 3-blade, constant-speed -->
    <diameter unit="IN">75.0</diameter>
    <numblades>3</numblades>

    <!-- Direct-drive piston setup -->
    <gearratio>1.0</gearratio>

    <!-- Starter blade-angle assumptions for a constant-speed GA prop -->
    <minpitch>15.1</minpitch>
    <maxpitch>44.5</maxpitch>

    <!-- Match engine/governor operating envelope -->
    <minrpm>700.0</minrpm>
    <maxrpm>2575</maxrpm>

    <!-- Constant-speed governor enabled -->
    <constspeed>1</constspeed>

    <!-- No reverse on this aircraft -->
    <reversepitch>0.0</reversepitch>

    <!-- Leave neutral for now; tune only if needed -->
    <ct_factor>1.15</ct_factor>
    <cp_factor>1.25</cp_factor>

    <!--
        C_THRUST and C_POWER are starter generic curves vs advance ratio J.
        These are estimated, not Hartzell/Mooney manufacturer tables.
        Shape is chosen to be plausible for a 3-blade constant-speed piston prop.
    -->

    <table name="C_THRUST" type="internal">
        <tableData>
                    15.1    44.5
            0.0     0.115   0.068
            0.2     0.112   0.071
            0.4     0.106   0.073
            0.6     0.097   0.074
            0.8     0.085   0.072
            1.0     0.071   0.068
            1.2     0.056   0.063
            1.4     0.041   0.056
            1.6     0.026   0.046
            1.8     0.012   0.035
            2.0     0.000   0.023
            2.2    -0.008   0.011
        </tableData>
    </table>

    <table name="C_POWER" type="internal">
        <tableData>
                    15.1    44.5
            0.0     0.050   0.097
            0.2     0.052   0.098
            0.4     0.053   0.099
            0.6     0.052   0.108
            0.8     0.049   0.118
            1.0     0.044   0.116
            1.2     0.037   0.112
            1.4     0.029   0.098
            1.6     0.020   0.070
            1.8     0.012   0.049
            2.0     0.005   0.039
            2.2     0.000   0.031
        </tableData>
    </table>

    <!--
        Optional Mach correction tables.
        Keep neutral initially so they do not distort early tuning.
        You can remove them entirely if you want even simpler behavior.
    -->
    <table name="CT_MACH" type="internal">
        <tableData>
            0.0 1.00
            0.5 1.00
            0.7 0.99
            0.8 0.97
            0.9 0.93
            1.0 0.88
            1.1 0.80
        </tableData>
    </table>

    <table name="CP_MACH" type="internal">
        <tableData>
            0.0 1.00
            0.5 1.00
            0.7 1.01
            0.8 1.03
            0.9 1.06
            1.0 1.10
            1.1 1.16
        </tableData>
    </table>

</propeller>
